# Name of file, which contains data of indicators
fn := "C:\___Rgata2020\InfoCalcs\M2F3.txt"
xx := READPRN(fn)
# Size of indicators' spaces
space_n := 1
# Znachenie vnutryclassovogo rasstoyaniya
# dlya 1 elementa
# Amount of indicators
N := cols(xx) - 1
# Manual input
fpriz := 0
N = 3
# if fpriz = 1 - manual input
# if fpriz = 0 - automatic search
rs1 := 0.001
mm := rows(xx) - 1
N = 3
arrpr := [1; 2]
xx := csort(xx, 0)
printmatr := 1
f(i) :=
    for e ∈ 0 .. mm
        x[e] ← xx[e, i]
    x
xx = [1, 1, 0, 1; 1, 1, 0, 0; 1, 1, 1, 0; 1, 0, 0, 0; 2, 0, 1, 1; 2, 0, 1, 0; 2, 0, 0, 1; 2, 1, 1, 1]
v := f(0)
# Amount of classes
dm := max(v)
dm = 2
# i - number of indicator
# n - class
cl :=
    i ← 1
    x[0] ← 0
    for e ∈ 0 .. mm - 1
        if xx[e, 0] ≠ xx[e + 1, 0]
            x[i] ← e + 1
            i ← i + 1
    x[i] ← length(v)
    x
cl = [0; 4; 8]
fx(ar, n) :=
    for i ∈ 0 .. rows(ar) - 1
        zz ← f(ar[i])
        for k ∈ cl[n - 1] .. cl[n] - 1
            l1[k - cl[n - 1], i] ← zz[k]
    l1
d(x, y, k, l) :=
    s ← 0
    for i ∈ 0 .. space_n - 1
        s ← s + (x[k, i] - y[l, i])^2
    s ← sqrt(s)
    s
# Mezhclassovoe rasstoyanie meshdu classami
# i & j po naboru priznakov ar
# Vnutriclassovoe rasstoyanie klassa i
# po naboru priznakov ar
# Amount of indicators' sets checked
arr26(n, k) :=
    if k < n
        for i ∈ 1 .. k
            aa[i - 1] ← i
        p ← k
        i1 ← 1
        while p ≥ 1
            zz1[i1] ← aa
            i1 ← i1 + 1
            p ← p - 1 if aa[k - 1] == n
            p ← k otherwise
            if p ≥ 1
                i ← k
                while i ≥ p
                    aa[i - 1] ← aa[p - 1] + i - p + 1
                    i ← i - 1
    if n == k
        for i ∈ 1 .. k
            aa[i - 1] ← i
        zz1[1] ← aa
    zz1
clm :=
    clm ← rows(arrpr) if fpriz == 1
    clm ← N!/(space_n!*(N - space_n)!) otherwise
    clm
Dij(i, j, ar) :=
    dd ← 0 if i == j
    otherwise
        x ← fx(ar, i)
        y ← fx(ar, j)
        mi ← cl[i] - cl[i - 1]
        mj ← cl[j] - cl[j - 1]
        dd ← sum(sum(d(x, y, k, l), l = 0 .. mj - 1), k = 0 .. mi - 1)/(mi*mj)
    dd
di(i, ar) :=
    x ← fx(ar, i)
    mi ← cl[i] - cl[i - 1]
    dd ← 0
    if mi ≠ 1
        for k ∈ 0 .. mi - 2
            for l ∈ k + 1 .. mi - 1
                dd ← dd + d(x, x, k, l)
        dd ← 2*dd/(mi*(mi - 1))
    dd ← rs1 if dd == 0
    dd
clm = 3  # arr26 - all the combinations
lar :=
    if fpriz == 1
        for i ∈ 1 .. clm
            for j ∈ 0 .. cols(arrpr) - 1
                xx[j] ← arrpr[i - 1, j]
            zz[i] ← xx
    zz ← arr26(N, space_n) otherwise
    zz
Dij(1, 2, lar[2]) = 0.625
di(1, lar[3]) = 0.5
di(2, lar[3]) = 0.5
q(ar) :=
    ss ← sum(di(i, ar), i = 1 .. dm)
    dd ← sum(sum(Dij(i, j, ar), j = 1 .. dm), i = 1 .. dm)/(2*(dm - 1)*ss)
    dd
otn_evcl :=
    for i ∈ 1 .. clm
        pp[i] ← q(lar[i])
    pp
fxy(i) :=
    for j ∈ 0 .. mm
        zz[j] ← xx[j, i]
    zz
# Otnoshenie mezhclass evcl k vnutryclass
# Otnoshenie meshclassovogo rasstoznia k vnutriclassovomu dlya 2 classov
mmx := 0
i - priznak
qij(ar, i, j) :=
    ss ← di(i, ar) + di(j, ar)
    ss ← rs1 if ss == 0
    dd ← Dij(i, j, ar)*1/ss
    dd
ii, jj - classes
priz_inf :=
    i1 ← -1
    for i ∈ 0 .. clm - 1
        if otn_evcl[i + 1] > mmx
            i1 ← i1 + 1
            qw ← lar[i + 1]
            for j ∈ 0 .. space_n - 1
                zz[i1, j] ← qw[j]
    zz  # list of more informative sets of indicators
priz_inf_zn :=
    i1 ← -1
    for i ∈ 0 .. clm - 1
        if otn_evcl[i + 1] > mmx
            i1 ← i1 + 1
            zz[i1, 0] ← otn_evcl[i + 1]
            zz[i1, 1] ← i + 1
    zz
# list of set's meaning of indicator and number of set in set's list lar
otn_evcl_ij(ii, jj) :=
    for i ∈ 1 .. clm
        pp[i] ← qij(lar[i], ii, jj)
    pp
priz_inf = [1; 2; 3]
priz_inf_zn = [0.625, 1; 0.625, 2; 0.625, 3]
# Meanings of the indicators
lar[3] = [3]
lar[409] =  # error: Индекс массива является недопустимым для этого массива.
otn_evcl_ij(1, 2) = [0; 0.625; 0.625; 0.625]
i1 :=
    for e ∈ 1 .. clm
        i1[e] ← e
    i1
transpose(otn_evcl) = [0, 0.625, 0.625, 0.625]
WRITEPRN("1.txt") := priz_inf_zn
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# Spisok znachenii otnosheniya evklidovyh rasstoyaniy clm(kolichestvo prostranstv)*spisok par klassov
oe :=
    ii ← 0
    for i ∈ 1 .. dm
        for j ∈ 1 .. dm
            if j > i
                ppij ← otn_evcl_ij(i, j)
                for j1 ∈ 1 .. clm
                    pp[j1 - 1, ii] ← ppij[j1]
                ii ← ii + 1
    pp
meanx(x) := mean(x)*2
oe = [0.625; 0.625; 0.625]
otn_evcl_m(oe) :=
    col ← cols(oe)
    for i ∈ 1 .. clm
        ii ← 1000000
        for j ∈ 0 .. col - 1
            ii ← oe[i - 1, j] if oe[i - 1, j] < ii
        pp[i] ← ii
    pp
lar[1] = [1]
otn_evcl_m(oe) = [0; 0.625; 0.625; 0.625]
i1 :=
    for e ∈ 1 .. clm
        i1[e] ← e
    i1
transpose(otn_evcl_m(oe)) = [0, 0.625, 0.625, 0.625]
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maxx(x) :=
    max1 ← x[0, 1]
    for i ∈ 1 .. cols(x) - 1
        max1 ← x[i - 1, i] if max1 < x[i - 1, i]
    max1
meanx(x) := mean(x)*2
maxx(x) :=
    max1 ← x[0, 1]
    for i ∈ 1 .. cols(x) - 1
        max1 ← x[i - 1, i] if max1 < x[i - 1, i]
    max1
# Matrica mezhclassovih rasstoyanii | Matrica vnutriclassovih rasstoyanii
# For set of indicators ar between i and j classes | For set of indicators ar,  i class
matr_in_evcl(ar, i) :=
    if printmatr == 1
        x ← fx(ar, i)
        mi ← cl[i] - cl[i - 1]
        for i1 ∈ 0 .. mi - 1
            for j1 ∈ 0 .. mi - 1
                zz[i1, j1] ← d(x, x, i1, j1)
    zz ← -1 otherwise
    zz
matr_vn_evcl(ar, i, j) :=
    if printmatr == 1
        x ← fx(ar, i)
        y ← fx(ar, j)
        mi ← cl[i] - cl[i - 1]
        mj ← cl[j] - cl[j - 1]
        for i1 ∈ 0 .. mi - 1
            for j1 ∈ 0 .. mj - 1
                zz[i1, j1] ← d(x, y, i1, j1)
    zz ← -1 otherwise
    zz
matr_in_evcl(lar[1], 1)
matr_in_evcl(lar[1], 1) = [0, 0, 0, 1; 0, 0, 0, 1; 0, 0, 0, 1; 1, 1, 1, 0]
mean(matr_vn_evcl(lar[2], 1, 2)) = 0.625
matr_in_evcl(lar[1], 2) = [0, 0, 0, 1; 0, 0, 0, 1; 0, 0, 0, 1; 1, 1, 1, 0]
matr_vn_evcl(lar[2], 1, 2) = [1, 1, 0, 1; 1, 1, 0, 1; 0, 0, 1, 0; 1, 1, 0, 1]
matr_in_evcl(lar[1], 2)
# Vnutryclass evclidovo rasstoyanie
vn_evcl(i) :=
    for j ∈ 1 .. clm
        pp[j] ← di(i, lar[j])
    pp
in1 := vn_evcl(1)
in2 := vn_evcl(2)
in1 = [0; 0.5; 0.5; 0.5]
in2 = [0; 0.5; 0.5; 0.5]
i1 :=
    for e ∈ 0 .. clm
        i1[e] ← e
    i1
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in3 := vn_evcl(3)
in4 := vn_evcl(4)
in3 =  # error: Эта переменная не определена.
in4 =  # error
minx(x) :=
    min1 ← x[0, 1]
    for i ∈ 1 .. cols(x) - 1
        min1 ← x[i - 1, i] if min1 > x[i - 1, i]
    min1
# sets of indicators
# Mezhclass evclidovo rasstoyanie
evcl_res(i) :=
    for j ∈ 1 .. dm
        for z ∈ 1 .. dm
            pp[j - 1, z - 1] ← Dij(j, z, lar[i])
    pp
evcl_res(1) = [0, 0.625; 0.625, 0]
evcl_res(2) = [0, 0.625; 0.625, 0]
# Distances
fpr(i) :=
    for e ∈ 0 .. mm
        x[e] ← xx[e, i]
    x
zet(i) :=
    0 if min(fpr(i)) == max(fpr(i))
    1/(max(fpr(i)) - min(fpr(i))) otherwise
dd :=
    for i ∈ 1 .. cols(xx) - 1
        for j ∈ 0 .. rows(xx) - 1
            dd[j, i] ← (xx[j, i] - min(fpr(i)))*zet(i)
    dd
fd(i) :=
    for e ∈ 0 .. mm
        x[e] ← dd[e, i]
    x
ee :=
    for i ∈ 0 .. space_n - 1
        for j ∈ 0 .. space_n - 1
            dd[i, j] ← 1 if i == j
            dd[i, j] ← 0 otherwise
    dd
min_dis :=
    nd ← 100
    for i ∈ 1 .. dm
        nd ← cl[i] - cl[i - 1] if nd > cl[i] - cl[i - 1]
    nd
min_dis = 4
# i - number of indicator
# n - class
wmn(x, i) :=
    s ← minx(x) if i == 1
    s ← maxx(x) if i == 2
    s ← meanx(x) if i == 3
    s
fxd(ar, n) :=
    if n ≤ dm
        for i ∈ 0 .. rows(ar) - 1
            zz ← fx(ar, n)
            for k ∈ 0 .. min_dis - 1
                l1[k, i] ← zz[k, i]
    l1
fxn(ar, n) :=
    if n ≤ dm
        for i ∈ 0 .. rows(ar) - 1
            zz ← fd(ar[i])
            for k ∈ cl[n - 1] .. cl[n - 1] + min_dis - 1
                l1[k - cl[n - 1], i] ← zz[k]
    l1
mcov(x, y) :=
    for i ∈ 0 .. cols(x) - 1
        for j ∈ 0 .. cols(y) - 1
            u ←
                for k ∈ 0 .. rows(x) - 1
                    u[k] ← x[k, i]
                u
            z ←
                for k ∈ 0 .. rows(y) - 1
                    z[k] ← y[k, j]
                z
            xz[i, j] ← cvar(u, z)
    xz
zeros(n) :=
    for i ∈ 0 .. n - 1
        for j ∈ 0 .. n - 1
            dd[j, i] ← 0
    dd
mcov1(x, y) :=
    z ← mcov(x, y)
    zz ← zeros(min_dis) if |z| ≤ 0.0001
    zz ← z^-1 otherwise
    zz
mod(xy) :=
    for i ∈ 0 .. rows(xy) - 1
        for j ∈ 0 .. cols(xy) - 1
            xy[i, j] ← |xy[i, j]|
    xy
dd = [0, 1, 0, 1; 0, 1, 0, 0; 0, 1, 1, 0; 0, 0, 0, 0; 0, 0, 1, 1; 0, 0, 1, 0; 0, 0, 0, 1; 0, 1, 1, 1]
xx = [1, 1, 0, 1; 1, 1, 0, 0; 1, 1, 1, 0; 1, 0, 0, 0; 2, 0, 1, 1; 2, 0, 1, 0; 2, 0, 0, 1; 2, 1, 1, 1]
# Mahalanobis distance
# Between the defined classes
mah(x, y, s) :=
    zz ← (x - y)*s^-1*transpose(x - y)
    mod(zz)
mah_res(i) :=
    for j ∈ 1 .. dm
        for z ∈ 1 .. dm
            x ← fxd(lar[i], j)
            y ← fxd(lar[i], z)
            s ← mcov(x, y)
            vv ← Dij(j, z, lar[i]) if |s| ≤ 0.00001
            vv ← mean(mah(x, y, s)) otherwise
            pp[j - 1, z - 1] ← vv
    pp
# i - set of indicators, j and z - classes
mahx(ii, jj) :=
    for i ∈ 1 .. clm
        x ← fxd(lar[i], ii)
        y ← fxd(lar[i], jj)
        s ← mcov(x, y)
        vv ← Dij(ii, jj, lar[i]) if |s| < 0.00001
        vv ← mean(mah(x, y, s)) otherwise
        pp[i] ← vv
    pp
mah_r_(i, j, z) :=
    x ← fx(lar[i], j)
    y ← fx(lar[i], z)
    s ← mcov(x, y)
    vv ← Dij(j, z, lar[i]) if |s| ≤ 0.00001
    vv ← mah(x, y, s) otherwise
    vv
mah_r_(1, 1, 2) = [
    5.33333, 5.33333, 5.33333, 5.33333;
    5.33333, 5.33333, 5.33333, 5.33333;
    5.33333, 5.33333, 5.33333, 5.33333;
    5.33333, 5.33333, 5.33333, 5.33333
]
mah_res(2) = [0, 5.33333; 5.33333, 0]
mahx(1, 2) = [0; 5.33333; 5.33333; 4]
mah_r_(2, 1, 2) = [
    5.33333, 5.33333, 5.33333, 5.33333;
    5.33333, 5.33333, 5.33333, 5.33333;
    5.33333, 5.33333, 5.33333, 5.33333;
    5.33333, 5.33333, 5.33333, 5.33333
]
mah_res(1) = [0, 5.33333; 5.33333, 0]
# Divergence | Between the classes
# i - set of indicators, j and z - classes
div(x, y) := 1/2*tr(mcov(x, x) - mcov(y, y))*(mcov1(x, x) - mcov1(y, y)) + 1/2*tr(mcov1(x, x) + mcov1(y, y))*(mean(x) - mean(y))^2
div_res(i) :=
    for j ∈ 1 .. dm
        for z ∈ 1 .. dm
            x ← fxd(lar[i], j)
            y ← fxd(lar[i], z)
            pp[j - 1, z - 1] ← mean(div(x, y))
    mod(pp)
div_res(1) = [0, 1.33333; 1.33333, 0]
divx(ii, jj) :=
    for i ∈ 1 .. clm
        x ← fx(lar[i], ii)
        y ← fx(lar[i], jj)
        vv ← div(x, y)
        pp[i] ← mean(vv)
    pp
div_r_(i, j, z) :=
    x ← fxd(lar[i], j)
    y ← fxd(lar[i], z)
    vv ← div(x, y)
    vv
div_r_(1, 1, 2) = [1.33333]
div_res(2) = [0, 1.33333; 1.33333, 0]
divx(1, 2) = [0; 1.33333; 1.33333; 1.33333]
div_r_(2, 1, 2) = [1.33333]
# MSE
mse(x, y) := sum(sqrt(sum((x[l, i] - y[l, i])^2, l = 0 .. min_dis - 1)), i = 0 .. space_n - 1)/(min_dis*space_n)
mse_res(i) :=
    for j ∈ 1 .. dm
        for z ∈ 1 .. dm
            x ← fxd(lar[i], j)
            y ← fxd(lar[i], z)
            x ← csort(x, 0)
            y ← csort(y, 0)
            pp[j - 1, z - 1] ← mse(x, y)
    pp
mse_res(1) = [0, 0.353553; 0.353553, 0]
msex(ii, jj) :=
    for i ∈ 1 .. clm
        x ← fxd(lar[i], ii)
        y ← fxd(lar[i], jj)
        vv ← mse(x, y)
        pp[i] ← vv
    pp
mse_res(2) = [0, 0.353553; 0.353553, 0]
msex(1, 2) = [0; 0.5; 0.5; 0.353553]
# Chebyshev
cheb(x, y) :=
    i1 ← 0
    for i ∈ 0 .. space_n - 1
        for j ∈ 0 .. rows(x) - 1
            zz[i1] ← |x[j, i] - y[j, i]|
            i1 ← i1 + 1
    zz
cheb_res(i) :=
    for j ∈ 1 .. dm
        for z ∈ 1 .. dm
            x ← fxd(lar[i], j)
            y ← fxd(lar[i], z)
            x ← csort(x, 0)
            y ← csort(y, 0)
            pp[j - 1, z - 1] ← max(cheb(x, y))
    pp
# i - set of indicators, j and z - classes
cheb_res(1) = [0, 1; 1, 0]
chebx(ii, jj) :=
    for i ∈ 1 .. clm
        x ← fxd(lar[i], ii)
        y ← fxd(lar[i], jj)
        vv ← max(cheb(x, y))
        pp[i] ← vv
    pp
cheb_r_(i, j, z) :=
    x ← fxd(lar[i], j)
    y ← fxd(lar[i], z)
    cheb(x, y)
chebx(1, 2) = [0; 1; 1; 1]
cheb_r_(1, 1, 2) = [1; 1; 1; 1]
cheb_res(2) = [0, 1; 1, 0]
cheb_r_(2, 1, 2) = [1; 1; 1; 1]
# Correlation
kor(x, y) :=
    sk ← sqrt(var(x))
    sl ← sqrt(var(y))
    sk ← 1 if sk < 0.00001
    sl ← 1 if sl < 0.00001
    mk ← mean(x)
    ml ← mean(y)
    s ← 0
    for i ∈ 0 .. rows(x) - 1
        s ← s + |(x[i] - mk)*(y[i] - ml)|
    s ← 1 - s/(rows(x)*sk*sl)
    s
kor_res(i) :=
    for j ∈ 1 .. dm - 1
        for z ∈ j + 1 .. dm
            x ← fxd(lar[i], j)
            y ← fxd(lar[i], z)
            for z1 ∈ 0 .. space_n - 1
                for j1 ∈ 0 .. rows(x) - 1
                    x1[j1] ← x[j1, z1]
                    y1[j1] ← y[j1, z1]
                pp1[z1] ← kor(x1, y1)
            pp[j - 1, z - 1] ← mean(pp1)
    mod(pp)
kor_res(1) = [0, 2.22045e-16]
korx(ii, jj) :=
    for i ∈ 1 .. clm
        x ← fxd(lar[i], ii)
        y ← fxd(lar[i], jj)
        for z1 ∈ 0 .. space_n - 1
            for j1 ∈ 0 .. rows(x) - 1
                x1[j1] ← x[j1, z1]
                y1[j1] ← y[j1, z1]
            pp1[z1] ← kor(x1, y1)
        pp[i] ← mean(pp1)
    pp
korx(1, 2) = [0; 0; 0; 0.333333]
kor_res(2) = [0, 2.22045e-16]
# Kamberra
kamb(x, y) :=
    zz ← 0
    for j ∈ 0 .. rows(x) - 1
        zz ← zz + |(x[j] - y[j])/(x[j] + y[j])|
    s ← zz
    s
kamb_res(i) :=
    for j ∈ 1 .. dm
        for z ∈ 1 .. dm
            pp[j - 1, z - 1] ← 0 if j == z
            otherwise
                x ← fxd(lar[i], j)
                y ← fxd(lar[i], z)
                x ← csort(x, 0)
                y ← csort(y, 0)
                for z1 ∈ 0 .. space_n - 1
                    for j1 ∈ 0 .. rows(x) - 1
                        x1[j1] ← x[j1, z1]
                        y1[j1] ← y[j1, z1]
                    pp1[z1] ← kamb(x1, y1)
                pp[j - 1, z - 1] ← mean(pp1)
    pp
kambx(ii, jj) :=
    for i ∈ 0 .. clm - 1
        x ← fxd(lar[i], ii)
        y ← fxd(lar[i], jj)
        for z1 ∈ 0 .. space_n - 1
            for j1 ∈ 0 .. rows(x) - 1
                x1[j1] ← x[j1, z1]
                y1[j1] ← y[j1, z1]
            pp1[z1] ← kamb(x1, y1)
        pp[i + 1] ← min(pp1)
    pp
kamb_res(1) = [0, 2; 2, 0]
kamb_res(2) = [0, 2; 2, 0]
# Graphics
priz_dis :=
    for i ∈ 1 .. clm
        j ← 3
        pp[0, i] ← wmn(mah_res(i), j)
        pp[1, i] ← wmn(evcl_res(i), j)
        pp[2, i] ← wmn(div_res(i), j)
        pp[3, i] ← wmn(mse_res(i), j)
        pp[4, i] ← wmn(cheb_res(i), j)
        pp[5, i] ← wmn(kor_res(i), j)
        pp[6, i] ← wmn(kamb_res(i), j)
    pp
fpr1(i) :=
    for e ∈ 1 .. clm
        x[e - 1] ← priz_dis[i, e]
    x
zet(i) :=
    0 if min(fpr1(i)) == max(fpr1(i))
    10/(max(fpr1(i)) - min(fpr1(i))) otherwise  # l
priz_dis = [
    0, 5.33333, 5.33333, 4;
    0, 0.625, 0.625, 0.625;
    0, 1.33333, 1.33333, 1.33333;
    0, 0.353553, 0.353553, 0.353553;
    0, 1, 1, 1;
    0, 0, 0, 0.333333;
    0, 2, 2, 2
]
pr2 :=
    for j ∈ 0 .. rows(priz_dis) - 1
        for i ∈ 1 .. clm
            dd1[j, i] ← (priz_dis[j, i] - min(fpr1(j)))*zet(j)
    dd1
fpr2(i) :=
    for e ∈ 1 .. clm
        x[e] ← pr2[i, e]
    x
kor_x := fpr2(5)
mah_x := fpr2(0)
evcl_x := fpr2(1)
div_x := fpr2(2)
mse_x := fpr2(3)
cheb_x := fpr2(4)
kamb_x := fpr2(6)
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i1 :=
    for e ∈ 0 .. N
        i1[e] ← e
    i1
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i1 :=
    for e ∈ 0 .. N
        i1[e] ← e
    i1
# ******************************************
max_(x, y) :=
    z ← x if x > y
    z ← y otherwise
    z
crossclass(ii, jj) :=
    for i ∈ 1 .. clm
        x ← fx(lar[i], ii)
        y ← fx(lar[i], jj)
        uu ← lar[i]
        zi ← rows(x)
        for j ∈ 0 .. rows(x) - 1
            fl1[j] ← 1
        for j ∈ 0 .. rows(y) - 1
            fl2[j] ← 1
        for z ∈ 0 .. space_n - 1
            ar[0] ← uu[z]
            zz ← fx(ar, jj)
            miny ← min(zz)
            maxy ← max(zz)
            zz ← fx(ar, ii)
            minx ← min(zz)
            maxx ← max(zz)
            if maxx ≥ miny or maxy ≤ minx
                for j ∈ 0 .. rows(x) - 1
                    if fl1[j] == 1
                        fl1[j] ← 0 if not (x[j, z] ≥ miny and x[j, z] ≤ maxy)
                for j ∈ 0 .. rows(y) - 1
                    if fl2[j] == 1
                        fl2[j] ← 0 if not (y[j, z] ≥ minx and y[j, z] ≤ maxx)
            otherwise
                for j ∈ 0 .. rows(x) - 1
                    fl1[j] ← 0
                for j ∈ 0 .. rows(y) - 1
                    fl2[j] ← 0
        pp[1, i] ← sum(fl2)
        pp[0, i] ← sum(fl1)
    pp
min_(x, y) :=
    z ← y if x > y
    z ← x otherwise
    z
crossclass(1, 2) = [0, 4, 4, 4; 0, 4, 4, 4]
crossclass(1, 3) =  # error
crossclass(2, 3) =  # error
crossclass(2, 4) =  # error
crossclass(3, 4) =  # error
crossclass(1, 4) =  # error
